OpenVSP model (file version 5), 6 components.
Geometry view with OpenVSP parameter names; values to 6 digits, angles in degrees, lengths in the model's unit.
Overall bounding box: X_Min=-0.819672 X_Len=1.91967 Y_Min=-0.996195 Y_Len=1.99239 Z_Min=-0.0750387 Z_Len=0.310042

Wing "WingGeom"
  location (X Y Z) 0.983607 -0.8 -0.07, rotation 0 0 0
  symmetric about XZ
  bounding box size 0.1 1.6 0.310042
  totals: TotalSpan=0.6 TotalProjectedSpan=1e-06 TotalChord=0.1 TotalArea=0.06 TotalAR=0
  root: chord 0.1, twist 0.314961, NACA 4-series Camber=0 CamberLoc=0.2 ThickChord=0.1
  sections:
    n  Span  Root_Chord  Tip_Chord  Area  Sweep  Sweep_Location  Dihedral  Twist  Twist_Location  tip airfoil
    1  0.3   0.1         0.1        0.03  0      0               90        0      0.25            as above

Wing "WingGeom", child of "WingGeom"
  location (X Y Z) -0.819672 0 0, rotation 0 0 0
  symmetric about XZ
  bounding box size 0.226247 0.590885 0.0721776
  totals: TotalSpan=0.6 TotalProjectedSpan=0.590885 TotalChord=0.2 TotalArea=0.12 TotalAR=2.90954
  root: chord 0.2, twist 0.314961, NACA 4-series Camber=0 CamberLoc=0.2 ThickChord=0.1
  sections:
    n  Span  Root_Chord  Tip_Chord  Area  Sweep  Sweep_Location  Dihedral  Twist  Twist_Location  tip airfoil
    1  0.3   0.2         0.2        0.06  5      0               10        0      0.25            as above

Wing "WingGeom", child of "WingGeom"
  location (X Y Z) 0 0 0, rotation 0 0 0
  symmetric about XZ
  bounding box size 0.287489 1.99239 0.107239
  totals: TotalSpan=2 TotalProjectedSpan=1.99239 TotalChord=0.2 TotalArea=0.4 TotalAR=9.92404
  root: chord 0.2, twist 0.314961, NACA 4-series Camber=0 CamberLoc=0.2 ThickChord=0.1
  sections:
    n  Span  Root_Chord  Tip_Chord  Area  Sweep  Sweep_Location  Dihedral  Twist  Twist_Location  tip airfoil
    1  1     0.2         0.2        0.2   5      0               5         0      0.25            as above

Wing "WingGeom", child of "WingGeom"
  location (X Y Z) 0.983607 -0.95 0.0819672, rotation 0 0 0
  symmetric about XZ
  bounding box size 0.1 1.9 0.0100416
  totals: TotalSpan=0.6 TotalProjectedSpan=0.6 TotalChord=0.1 TotalArea=0.06 TotalAR=6
  root: chord 0.1, twist 0.314961, NACA 4-series Camber=0 CamberLoc=0.2 ThickChord=0.1
  sections:
    n  Span  Root_Chord  Tip_Chord  Area  Sweep  Sweep_Location  Dihedral  Twist  Twist_Location  tip airfoil
    1  0.3   0.1         0.1        0.03  0      0               0         0      0.25            as above

Fuselage "FuselageGeom"
  location (X Y Z) 0.1 0.8 0.09, rotation 0 0 0
  symmetric about XZ
  bounding box size 1 1.63 0.03
  Design: Length=1
  cross sections:
    n  XLocPercent  YLocPercent  ZLocPercent  shape
    0  0            0            0            ellipse Ellipse_Height=0.03 Ellipse_Width=0.03
    1  0.25         0            0            as above
    2  0.5          0            0            as above
    3  0.75         0            0            as above
    4  1            0            0            as above

Fuselage "FuselageGeom", child of "FuselageGeom"
  location (X Y Z) -0.8 0 0, rotation 0 0 0
  bounding box size 1 0.03 0.03
  Design: Length=1
  cross sections:
    n  XLocPercent  YLocPercent  ZLocPercent  shape
    0  0            0            0            ellipse Ellipse_Height=0.03 Ellipse_Width=0.03
    1  0.25         0            0            as above
    2  0.5          0            0            as above
    3  0.75         0            0            as above
    4  1            0            0            as above
